<Lems>

    <!--

        This LEMS file has been automatically generated using PyNeuroML v1.3.14 (libNeuroML v0.6.5)

     -->

    <!-- Specify which component to run -->
    <Target component="Worm2D" reportFile="report.txt"/>

    <!-- Include core NeuroML2 ComponentType definitions -->
    <Include file="Cells.xml"/>
    <Include file="Networks.xml"/>
    <Include file="Simulation.xml"/>

    <Include file="testnet.nml"/>

    <Simulation id="Worm2D" length="20000.0ms" step="5.0ms" target="Worm2DNet" seed="12345">  <!-- Note seed: ensures same random numbers used every run -->
        <Display id="display0" title="States" timeScale="1ms" xmin="-2000.0" xmax="22000.0" ymin="-15" ymax="10">
            <Line id="DA[0]" quantity="PopDA[0]/state" scale="1" color="#F0F8FF" timeScale="1ms"/>
            <Line id="DB[0]" quantity="PopDB[0]/state" scale="1" color="#8A2BE2" timeScale="1ms"/>
            <Line id="DD[0]" quantity="PopDD[0]/state" scale="1" color="#00FFFF" timeScale="1ms"/>
            <Line id="VA[0]" quantity="PopVA[0]/state" scale="1" color="#FF8C00" timeScale="1ms"/>
            <Line id="VB[0]" quantity="PopVB[0]/state" scale="1" color="#FF1493" timeScale="1ms"/>
            <Line id="VD[0]" quantity="PopVD[0]/state" scale="1" color="#F8F8FF" timeScale="1ms"/>
        </Display>

        <Display id="display1" title="Outputs" timeScale="1ms" xmin="-2000.0" xmax="22000.0" ymin="-.1" ymax="1">
            <Line id="DA[0]" quantity="PopDA[0]/output" scale="1" color="#F0F8FF" timeScale="1ms"/>
            <Line id="DB[0]" quantity="PopDB[0]/output" scale="1" color="#8A2BE2" timeScale="1ms"/>
            <Line id="DD[0]" quantity="PopDD[0]/output" scale="1" color="#00FFFF" timeScale="1ms"/>
            <Line id="VA[0]" quantity="PopVA[0]/output" scale="1" color="#FF8C00" timeScale="1ms"/>
            <Line id="VB[0]" quantity="PopVB[0]/output" scale="1" color="#FF1493" timeScale="1ms"/>
            <Line id="VD[0]" quantity="PopVD[0]/output" scale="1" color="#F8F8FF" timeScale="1ms"/>
        </Display>

        <OutputFile id="states_file" fileName="Worm2D.states.dat">
            <OutputColumn id="DA[0]" quantity="PopDA[0]/state"/>
            <OutputColumn id="DB[0]" quantity="PopDB[0]/state"/>
            <OutputColumn id="DD[0]" quantity="PopDD[0]/state"/>
            <OutputColumn id="VA[0]" quantity="PopVA[0]/state"/>
            <OutputColumn id="VB[0]" quantity="PopVB[0]/state"/>
            <OutputColumn id="VD[0]" quantity="PopVD[0]/state"/>
        </OutputFile>

        <OutputFile id="outputs_file" fileName="Worm2D.outputs.dat">
            <OutputColumn id="DA[0]" quantity="PopDA[0]/output"/>
            <OutputColumn id="DB[0]" quantity="PopDB[0]/output"/>
            <OutputColumn id="DD[0]" quantity="PopDD[0]/output"/>
            <OutputColumn id="VA[0]" quantity="PopVA[0]/output"/>
            <OutputColumn id="VB[0]" quantity="PopVB[0]/output"/>
            <OutputColumn id="VD[0]" quantity="PopVD[0]/output"/>
        </OutputFile>

    </Simulation>

</Lems>
