<neuroml xmlns="http://www.neuroml.org/schema/neuroml2"  xmlns:xs="http://www.w3.org/2001/XMLSchema" xmlns:xsi="http://www.w3.org/2001/XMLSchema-instance" xsi:schemaLocation="http://www.neuroml.org/schema/neuroml2 https://raw.github.com/NeuroML/NeuroML2/development/Schemas/NeuroML2/NeuroML_v2.3.1.xsd" id="Worm2D">
    <include href="cell_syn_X.xml"/>
    <expOneSynapse id="syn0" gbase="65nS" erev="0mV" tauDecay="3ms"/>
    <network id="Worm2DNet">
        <population id="AllCells" component="GenericNeuronCellX" size="60"/>
        <electricalProjection id="ElectricalProj" presynapticPopulation="AllCells" postsynapticPopulation="AllCells">
            <electricalConnectionInstanceW id="0" preCell="../AllCells[7]" postCell="../AllCells[1]" synapse="gapJunction0" weight="0.111893748558795"/>
            <electricalConnectionInstanceW id="1" preCell="../AllCells[8]" postCell="../AllCells[2]" synapse="gapJunction0" weight="1.626882458649384"/>
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        </electricalProjection>
        <continuousProjection id="ChemicalProj" presynapticPopulation="AllCells" postsynapticPopulation="AllCells">
            <continuousConnectionInstanceW id="0" preCell="../AllCells[0]" postCell="../AllCells[0]" preComponent="silentSyn" postComponent="neuron_to_neuron_syn_x" weight="-2.528311446261591"/>
            <continuousConnectionInstanceW id="1" preCell="../AllCells[2]" postCell="../AllCells[0]" preComponent="silentSyn" postComponent="neuron_to_neuron_syn_x" weight="-14.672044016483778"/>
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        </continuousProjection>
    </network>
</neuroml>
